<!DOCTYPE autopilot SYSTEM "autopilot.dtd">

<autopilot name="Tello Autopilot (remote piloting with speed)">

  <state_machine name="ap" freq="PERIODIC_FREQUENCY" gcs_mode="true" settings_mode="true" settings_handler="autopilot_generated|SetModeHandler">

    <includes>
      <include name="generated/airframe.h"/>
      <include name="autopilot.h"/>
      <include name="autopilot_rc_helpers.h"/>
      <include name="navigation.h"/>
      <include name="guidance/guidance_speed.h"/>
      <include name="subsystems/radio_control.h"/>
      <include name="subsystems/gps.h"/>
      <define name="MODE_MANUAL" value="AP_MODE_SPEED" cond="ifndef MODE_MANUAL"/>
      <define name="MODE_AUTO1" value="AP_MODE_GUIDED" cond="ifndef MODE_AUTO1"/>
      <define name="MODE_AUTO2" value="AP_MODE_NAV" cond="ifndef MODE_AUTO2"/>
      <define name="RCLost()" value="(radio_control.status == RC_REALLY_LOST)"/>
    </includes>

    <settings>
      <dl_setting var="autopilot.kill_throttle" min="0" step="1" max="1" module="autopilot" values="Resurrect|Kill" handler="KillThrottle"/>
    </settings>

    <control_block name="speed_loop">
    </control_block>

    <exceptions>
      <exception cond="too_far_from_home" deroute="HOME"/>
      <exception cond="kill_switch_is_on()" deroute="KILL"/>
    </exceptions>

    <mode name="SPEED">
      <select cond="RCMode0()"/>
      <control freq="NAV_FREQ">
        <call fun="nav_periodic_task()"/>
      </control>
      <control>
        <call fun="guidance_speed_read_rc(autopilot_in_flight())"/>
        <call fun="guidance_speed_run(autopilot_in_flight())"/>
        <call_block name="speed_loop"/>
      </control>
      <exception cond="RCLost()" deroute="FAILSAFE"/>
    </mode>

    <mode name="GUIDED">
      <select cond="RCMode1()" exception="HOME"/>
      <on_enter>
        <call fun="guidance_speed_hover_enter()"/>
        <!--call fun="guidance_v_guided_enter()"/-->
      </on_enter>
      <control freq="NAV_FREQ">
        <call fun="nav_periodic_task()"/>
      </control>
      <control>
        <!--call fun="guidance_speed_read_rc()"/-->
        <call fun="guidance_speed_guided_run(autopilot_in_flight())"/>
        <call_block name="speed_loop"/>
      </control>
      <exception cond="GpsIsLost() && autopilot_in_flight()" deroute="FAILSAFE"/>
    </mode>

    <mode name="NAV">
      <select cond="$DEFAULT_MODE"/>
      <select cond="RCMode2()" exception="HOME"/>
      <on_enter>
        <call fun="guidance_speed_nav_enter()"/>
      </on_enter>
      <control freq="NAV_FREQ">
        <call fun="nav_periodic_task()"/>
      </control>
      <control>
        <!--call fun="guidance_speed_read_rc()"/-->
        <call fun="guidance_speed_from_nav(autopilot_in_flight())"/>
        <call_block name="speed_loop"/>
      </control>
      <exception cond="GpsIsLost() && autopilot_in_flight()" deroute="FAILSAFE"/>
    </mode>

    <mode name="HOME">
      <on_enter>
        <call fun="guidance_speed_nav_enter()"/>
      </on_enter>
      <control freq="NAV_FREQ">
        <call fun="nav_home()"/>
      </control>
      <control>
        <call fun="guidance_speed_from_nav(autopilot_in_flight())"/>
        <call_block name="speed_loop"/>
      </control>
      <exception cond="GpsIsLost()" deroute="FAILSAFE"/>
    </mode>

    <!-- Safe landing -->
    <mode name="FAILSAFE" shortname="FAIL">
      <on_enter>
        <!--call fun="tello_land()"/-->
      </on_enter>
      <control>
      </control>
      <!--exception cond="!GpsIsLost()" deroute="$LAST_MODE"/-->
    </mode>

    <!-- Kill throttle mode -->
    <mode name="KILL">
      <on_enter>
        <!--call fun="tello_emergency()"/-->
      </on_enter>
      <control>
      </control>
    </mode>

  </state_machine>

</autopilot>
